# OpenSim document version 30516
ForwardTool cyclingleg:
  replace_force_set: false
  results_directory: C:\Users\cclan\Documents\OpenSim\4.1\Models\ME485cycling\forwardvas
  output_precision: 8
  initial_time: 0
  final_time: 3.330799
  solve_for_equilibrium_for_auxiliary_states: true
  maximum_number_of_integrator_steps: 20000
  maximum_integrator_step_size: 1
  minimum_integrator_step_size: 1e-8
  integrator_error_tolerance: 1e-5
  use_specified_dt: false
  AnalysisSet Analyses:
    ProbeReporter MetabolicsReporter
  ControllerSet Controllers:
    ControlSetController: controls_file=vastcontrols_good.xml
