# OpenSim document version 30000
ForceSet cyclingleg_Actuators:
  # Actuators on the base segement are called Residual actuators
  # whose forces account for the errors in the model, its kinematic
  # that do not balance with experimental ground reaction forces
  # Actuators on the Coordinates are called Reserve actuators
  # and are used the drive the model when the model excludes its muscles (i.e. RRA)
  # or when muscles are insufficient to track desired kinematics (CMC)
  CoordinateActuator crank_angle: coordinate=crank_angle optimal_force=1
  CoordinateActuator pelvis_tilt: coordinate=pelvis_tilt optimal_force=1
  CoordinateActuator pelvis_list: coordinate=pelvis_list optimal_force=1
  CoordinateActuator pelvis_rotation: coordinate=pelvis_rotation optimal_force=1
  CoordinateActuator pelvis_tx: coordinate=pelvis_tx optimal_force=1
  CoordinateActuator pelvis_ty: coordinate=pelvis_ty optimal_force=1
  CoordinateActuator pelvis_tz: coordinate=pelvis_tz optimal_force=1
  CoordinateActuator hip_angle_r: coordinate=hip_angle_r optimal_force=1
  CoordinateActuator hip_adduction_r: coordinate=hip_adduction_r optimal_force=1
  CoordinateActuator hip_rotation_r: coordinate=hip_rotation_r optimal_force=1
  CoordinateActuator knee_angle_r: coordinate=knee_angle_r optimal_force=1
  CoordinateActuator mtp_angle_r: coordinate=mtp_angle_r optimal_force=1
