# OpenSim document version 30000
CMC_TaskSet cyclingleg_CEC:
  CMC_Joint [values shared by the 12 below unless stated]: active=(true false false) kp=100 kv=20
  CMC_Joint crank_angle: weight=500 coordinate=crank_angle
  CMC_Joint pelvis_tilt: weight=250 coordinate=pelvis_tilt
  CMC_Joint pelvis_list: weight=700 wrt_body=-1 express_body=-1 coordinate=pelvis_list
  CMC_Joint pelvis_rotation: weight=250 coordinate=pelvis_rotation
  CMC_Joint pelvis_tx: weight=200 coordinate=pelvis_tx
  CMC_Joint pelvis_ty: weight=400 coordinate=pelvis_ty
  CMC_Joint pelvis_tz: weight=250 coordinate=pelvis_tz
  CMC_Joint hip_angle_r: weight=200 coordinate=hip_angle_r
  CMC_Joint hip_adduction_r: weight=400 coordinate=hip_adduction_r
  CMC_Joint hip_rotation_r: weight=500 coordinate=hip_rotation_r
  CMC_Joint knee_angle_r: weight=500 coordinate=knee_angle_r
  CMC_Joint mtp_angle_r: weight=500 coordinate=mtp_angle_r
