# OpenSim document version 30000
CMCTool cyclingleg:
  replace_force_set: false
  force_set_files: CMC/cyclingleg_Actuators.xml
  results_directory: CMC/ResultsCMC
  output_precision: 8
  initial_time: 0
  final_time: 1
  solve_for_equilibrium_for_auxiliary_states: true
  maximum_number_of_integrator_steps: 20000
  maximum_integrator_step_size: 1
  minimum_integrator_step_size: 1e-8
  integrator_error_tolerance: 1e-5
  desired_kinematics_file: CMC/cyclingleg_Kinematics_q.sto
  task_set_file: CMC/cyclingleg_kinematics_Tracking_Tasks.xml
  lowpass_cutoff_frequency: -1
  cmc_time_window: 0.01
  use_fast_optimization_target: true
  optimizer_algorithm: ipopt
  numerical_derivative_step_size: 1e-5
  optimization_convergence_tolerance: 1e-5
  optimizer_max_iterations: 1000
  optimizer_print_level: 0
  use_verbose_printing: false
  AnalysisSet Analyses:
    ProbeReporter MetabolicsReporter
  ControllerSet Controllers:
    ControlSetController: controls_file=vastcontrols_good.xml
