# OpenSim document version 40000
CMCTool CMC_leg:
  model_file: C:\Users\cclan\Documents\GitHub\spec-opensim\full_workflow_03112021\full_workflow\Computed_Muscle_Control\cmc_cyclingleg_t_102_r_0.8396_probed.osim
  replace_force_set: false
  force_set_files: cmc_leg_Actuators.xml
  results_directory: ../Results/Saddle_t_102_r_0.8396/CMC
  output_precision: 8
  initial_time: 0
  final_time: 0.75
  solve_for_equilibrium_for_auxiliary_states: true
  maximum_number_of_integrator_steps: 20000
  maximum_integrator_step_size: 1
  minimum_integrator_step_size: 1e-8
  integrator_error_tolerance: 1e-5
  external_loads_file: ../Results/Saddle_t_102_r_0.8396/SFK/pedal_clip_forces.xml
  desired_kinematics_file: ../Results/Saddle_t_102_r_0.8396/SFK/sfk_cyclingleg_Kinematics_q.sto
  task_set_file: cmc_leg_Tracking_Tasks.xml
  lowpass_cutoff_frequency: -1
  cmc_time_window: 0.01
  use_fast_optimization_target: false
  optimizer_algorithm: ipopt
  numerical_derivative_step_size: 1e-5
  optimization_convergence_tolerance: 1e-5
  optimizer_max_iterations: 1000
  optimizer_print_level: 2
  use_verbose_printing: true
  AnalysisSet Analyses:
    ProbeReporter MetabolicsReporter
