# OpenSim document version 30000
CMC_TaskSet cyclingleg_CEC:
  CMC_Joint crank_angle: weight=500 active=(true false false) kp=100 kv=20 coordinate=crank_angle
  CMC_Joint hip_angle_r: weight=200 active=(true false false) kp=100 kv=20 coordinate=hip_angle_r
  CMC_Joint knee_angle_r: weight=500 active=(true false false) kp=100 kv=20 coordinate=knee_angle_r
