# OpenSim document version 40000
Model SoccerBallKickingModel_probed:
  gravity: 0 -9.80665 0
  length_units: meters
  force_units: N
  credits:
    Seth A., Reinbolt J.A, Delp D., Hamner S., Habib A., Delp S.L., Loan J.P.
  publications:
    Notes: 2D, 6 DOF leg model created by Jeff Reinbolt, Ajay Seth, and Scott L. Delp, Stanford University. Lower extremity joint defintions based on Delp et al. (1990). Number of muscles was reduced by Reinbolt to improve simulation speed for demonstrations and is not intended to be used in research. Number of constraints reduced by A. Seth. Foot-ball-ground contact added by A. Seth. Soccer ball and goal added by Seth using OpenSim geometry created by Denny Delp. Graphics for ball and customized GUI by Ayman Habib Backstop of net and full body model contributed by Samuel Hamner and added by A. Seth Goalie is the "Freebie Man 3d model" from http://thefree3dmodels.com/stuff/characters/freebie_man/14-1-0-1166 and added by A. Seth
  Ground: meshes=(Soccer_frame.STL Soccer_net.STL)
  BodySet:
    Body swivel: mass=0 [kg] mass_center=(0 0 0) inertia=(0 0 0 0 0 0)
    Body pelvis: mass=10.43488 mass_center=(-0.0699812 0 0) inertia=(0.0892422 0.0756128 0.0502638 0 0 0)
        meshes=(sacrum.vtp pelvis.vtp l_pelvis.vtp)
    Body femur_r: mass=8.549266 mass_center=(0 -0.199543 0) inertia=(0.169564 0.0444489 0.178809 0 0 0)
        meshes=femur_r.vtp
    Body tibia_r: mass=4.674042 mass_center=(0 -0.2098 0) inertia=(0.0802351 0.00811903 0.0813495 0 0 0)
        meshes=(tibia_r.vtp fibula_r.vtp)
    Body patella_r: mass=0.09191376 mass_center=(0 0 0) inertia=(0.00110296 0.00110296 0.00110296 0 0 0) meshes=pat.vtp
    Body talus_r: mass=0.1260686 mass_center=(0 0 0) inertia=(0.00202166 0.00202166 0.00202166 0 0 0) meshes=talus.vtp
    Body calcn_r: mass=1.072248 mass_center=(0.102693 0.0308079 0) inertia=(0.00090462 0.00361848 0.00361848 0 0 0)
        meshes=foot.vtp
    Body toes_r: mass=0.1861423 mass_center=(0.0359425 0.00616157 -0.0184847) inertia=(0 0 0.00090462 0 0 0)
        meshes=bofoot.vtp
    Body femur_l: mass=8.549266 mass_center=(0 -0.199543 0) inertia=(0.169564 0.0444489 0.178809 0 0 0)
        meshes=femur_l.vtp
    Body tibia_l: mass=4.674042 mass_center=(0 -0.2098 0) inertia=(0.0802351 0.00811903 0.0813495 0 0 0)
        meshes=(tibia_l.vtp fibula_l.vtp)
    Body patella_l: mass=0.09191376 mass_center=(0 0 0) inertia=(0.00110296 0.00110296 0.00110296 0 0 0)
        meshes=l_pat.vtp
    Body talus_l: mass=0.1260686 mass_center=(0 0 0) inertia=(0.00202166 0.00202166 0.00202166 0 0 0)
        meshes=l_talus.vtp
    Body calcn_l: mass=1.072248 mass_center=(0.102693 0.0308079 0) inertia=(0.00090462 0.00361848 0.00361848 0 0 0)
        meshes=l_foot.vtp
    Body toes_l: mass=0.1861423 mass_center=(0.0359425 0.00616157 -0.0184847) inertia=(0 0 0.00090462 0 0 0)
        meshes=bofoot.vtp
    Body torso: mass=23.7694 mass_center=(0.0324005 0.378854 -0.00089513) inertia=(1.45984 0.747987 1.41717 0 0 0)
        meshes=(hat_spine.vtp hat_jaw.vtp hat_skull.vtp hat_ribs_scap.vtp)
    Body humerus_r: mass=1.800873 mass_center=(0 -0.17503 0) inertia=(0.00955261 0.00329536 0.0107225 0 0 0)
        meshes=humerus_rv.vtp
    Body ulna_r: mass=0.5382684 mass_center=(0 -0.145447 0) inertia=(0.00304691 0.00063572 0.00330511 0 0 0)
        meshes=ulna_rv.vtp
    Body radius_r: mass=0.5382684 mass_center=(0 -0.145447 0) inertia=(0.00304691 0.00063572 0.00330511 0 0 0)
        meshes=radius_rv.vtp
    Body hand_r: mass=0.4053626 mass_center=(0 -0.0762664 0) inertia=(0.00079034 0.00048467 0.00118729 0 0 0)
        meshes=(pisiform_rvs.vtp lunate_rvs.vtp scaphoid_rvs.vtp triquetrum_rvs.vtp hamate_rvs.vtp capitate_rvs.vtp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)
    Body humerus_l: mass=1.800873 mass_center=(0 -0.17503 0) inertia=(0.00955261 0.00329536 0.0107225 0 0 0)
        meshes=humerus_lv.vtp
    Body ulna_l: mass=0.5382684 mass_center=(0 -0.145447 0) inertia=(0.00304691 0.00063572 0.00330511 0 0 0)
        meshes=ulna_lv.vtp
    Body radius_l: mass=0.5382684 mass_center=(0 -0.145447 0) inertia=(0.00304691 0.00063572 0.00330511 0 0 0)
        meshes=radius_lv.vtp
    Body hand_l: mass=0.4053626 mass_center=(0 -0.0762664 0) inertia=(0.00079034 0.00048467 0.00118729 0 0 0)
        meshes=(pisiform_lvs.vtp lunate_lvs.vtp scaphoid_lvs.vtp triquetrum_lvs.vtp hamate_lvs.vtp capitate_lvs.vtp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)
    Body goalie: mass=150 mass_center=(0 1 0) inertia=(1.10079 0.400485 1.00119 0 0 0) meshes=goalie_smooth.obj
    Body ball: mass=0.25 mass_center=(0 0 0) inertia=(0.02 0.02 0.02 0 0 0)
        meshes=(soccer_ball_seg_Holes.obj soccer_ball.obj)
  JointSet:
    PinJoint ground_pelvis: socket_parent_frame=ground_offset socket_child_frame=swivel_offset
      Coordinate turn: default_value=0 range=(-0.5236 0.5236) clamped=false
      PhysicalOffsetFrame ground_offset: socket_parent=/ground translation=(0.5 1.06 -0.15) [meters]
          orientation=(-1.5708 0 0) [radians]
      PhysicalOffsetFrame swivel_offset: socket_parent=/bodyset/swivel translation=(0 0 0) orientation=(-1.5708 0 0)
    WeldJoint ground_swivel: socket_parent_frame=swivel_offset socket_child_frame=pelvis_offset
      PhysicalOffsetFrame swivel_offset: socket_parent=/bodyset/swivel translation=(0 0 0)
          orientation=(-0.0349066 0.139626 -0.0872664)
      PhysicalOffsetFrame pelvis_offset: socket_parent=/bodyset/pelvis translation=(0 0 0)
    CustomJoint hip_r: socket_parent_frame=pelvis_offset socket_child_frame=femur_r_offset
      Coordinate hip_flexion_r: default_value=-0.6981317 range=(-2.094395 2.094395) clamped=false
      PhysicalOffsetFrame pelvis_offset: socket_parent=/bodyset/pelvis translation=(-0.0739512 -0.0691397 0.0873398)
      PhysicalOffsetFrame femur_r_offset: socket_parent=/bodyset/femur_r translation=(0 0 0)
      SpatialTransform: axes_held_at_zero=(translation1 translation2 translation3)
        TransformAxis rotation1: coordinates=hip_flexion_r axis=(0 0 1) LinearFunction(coefficients=1 0)
        TransformAxis rotation2: axis=(1 0 0) Constant(value=-0.01555646)
        TransformAxis rotation3: axis=(0 1 0) Constant(value=-0.07460014)
    CustomJoint knee_r: socket_parent_frame=femur_r_offset socket_child_frame=tibia_r_offset
      Coordinate knee_angle_r: default_value=-1.919862 range=(-2.094395 0.1745329) clamped=false
      PhysicalOffsetFrame femur_r_offset: socket_parent=/bodyset/femur_r translation=(0 0 0)
      PhysicalOffsetFrame tibia_r_offset: socket_parent=/bodyset/tibia_r translation=(0 0 0)
      SpatialTransform: axes_held_at_zero=(rotation2 rotation3 translation3)
        TransformAxis rotation1: coordinates=knee_angle_r axis=(0 0 1) LinearFunction(coefficients=1 0)
        TransformAxis translation1: coordinates=knee_angle_r axis=(1 0 0)
          MultiplierFunction: scale=1
            SimmSpline: x=(-2.0944 -1.74533 -1.39626 -1.0472 -0.698132 -0.349066 -0.174533 0.197344 0.337395 0.490178 1.52146 2.0944)
                y=(-0.0037561 0.00210107 0.00482424 0.00481249 0.00248841 -0.00117378 -0.00363871 -0.00613534 -0.00637949 -0.00654265 -0.00637949 -0.00616234)
        TransformAxis translation2: coordinates=knee_angle_r axis=(0 1 0)
          MultiplierFunction: scale=1
            SimmSpline: x=(-2.0944 -1.22173 -0.523599 -0.349066 -0.174533 0.159149 2.0944)
                y=(-0.496039 -0.479137 -0.468338 -0.466695 -0.465521 -0.463953 -0.464817)
    CustomJoint tib_pat_r: socket_parent_frame=tibia_r_offset socket_child_frame=patella_r_offset
      Coordinate knee_angle_pat_r: default_value=-1.919862 range=(-2.094 10) clamped=false
      PhysicalOffsetFrame tibia_r_offset: socket_parent=/bodyset/tibia_r translation=(0 0 0)
      PhysicalOffsetFrame patella_r_offset: socket_parent=/bodyset/patella_r translation=(0 0 0)
      SpatialTransform: axes_held_at_zero=(rotation2 rotation3 translation3)
        TransformAxis rotation1: coordinates=knee_angle_pat_r axis=(0 0 1)
          SimmSpline: x=(-2.0944 -1.99997 -1.45752 -0.526391 0.0279253 0.174533)
              y=(0.308051 0.308051 0.306305 0.270177 -0.037001 -0.279951)
        TransformAxis translation1: coordinates=knee_angle_pat_r axis=(1 0 0)
          MultiplierFunction: scale=1
            SimmSpline: x=(-2.0944 -1.39626 -1.0472 -0.698132 -0.349066 -0.174533 0 0.00017453 0.00034907 0.0872665 2.0944)
                y=(0.0194405 0.0364088 0.042814 0.0483203 0.0527029 0.0543884 0.0557369 0.0557369 0.0557369 0.0557369 0.0557369)
        TransformAxis translation2: coordinates=knee_angle_pat_r axis=(0 1 0)
          MultiplierFunction: scale=1
            SimmSpline: x=(-2.0944 -1.5708 -1.39626 -1.0472 -0.698132 -0.349066 -0.174533 0 0.00017453 0.00034907 0.0872665 2.0944)
                y=(-0.0246096 -0.0226993 -0.0224746 -0.0229241 -0.0237107 -0.0246096 -0.0250591 -0.0255086 -0.0255086 -0.0255086 -0.0255086 -0.0255086)
    CustomJoint ankle_r: socket_parent_frame=tibia_r_offset socket_child_frame=talus_r_offset
      Coordinate ankle_angle_r: default_value=-0.174533 range=(-1.571 1.571) clamped=false
      PhysicalOffsetFrame tibia_r_offset: socket_parent=/bodyset/tibia_r translation=(0 -0.483203 0)
      PhysicalOffsetFrame talus_r_offset: socket_parent=/bodyset/talus_r translation=(0 0 0)
      SpatialTransform: axes_held_at_zero=(rotation2 rotation3 translation1 translation2 translation3)
        TransformAxis rotation1: coordinates=ankle_angle_r axis=(-0.105 -0.174 0.979) LinearFunction(coefficients=1 0)
    WeldJoint subtalar_r: socket_parent_frame=talus_r_offset socket_child_frame=calcn_r_offset
      PhysicalOffsetFrame talus_r_offset: socket_parent=/bodyset/talus_r translation=(-0.0620508 -0.0531864 0.0101307)
      PhysicalOffsetFrame calcn_r_offset: socket_parent=/bodyset/calcn_r translation=(0 0 0)
    WeldJoint mtp_r: socket_parent_frame=calcn_r_offset socket_child_frame=toes_r_offset
      PhysicalOffsetFrame calcn_r_offset: socket_parent=/bodyset/calcn_r translation=(0.18382 -0.00205386 0.00102692)
      PhysicalOffsetFrame toes_r_offset: socket_parent=/bodyset/toes_r translation=(0 0 0)
    WeldJoint hip_l: socket_parent_frame=pelvis_offset socket_child_frame=femur_l_offset
      PhysicalOffsetFrame pelvis_offset: socket_parent=/bodyset/pelvis translation=(-0.0739512 -0.0691397 -0.0873398)
          orientation=(0 0 0.349066)
      PhysicalOffsetFrame femur_l_offset: socket_parent=/bodyset/femur_l translation=(0 0 0)
    WeldJoint knee_l: socket_parent_frame=femur_l_offset socket_child_frame=tibia_l_offset
      PhysicalOffsetFrame femur_l_offset: socket_parent=/bodyset/femur_l translation=(-0.00363871 -0.465521 0)
          orientation=(0 0 -0.174533)
      PhysicalOffsetFrame tibia_l_offset: socket_parent=/bodyset/tibia_l translation=(0 0 0)
    WeldJoint tib_pat_l: socket_parent_frame=tibia_l_offset socket_child_frame=patella_l_offset
      PhysicalOffsetFrame tibia_l_offset: socket_parent=/bodyset/tibia_l translation=(0.0543884 -0.0250591 0)
          orientation=(0 0 0.1)
      PhysicalOffsetFrame patella_l_offset: socket_parent=/bodyset/patella_l translation=(0 0 0)
    WeldJoint ankle_l: socket_parent_frame=tibia_l_offset socket_child_frame=talus_l_offset
      PhysicalOffsetFrame tibia_l_offset: socket_parent=/bodyset/tibia_l translation=(0 -0.483203 0)
          orientation=(0 0 -0.0320559)
      PhysicalOffsetFrame talus_l_offset: socket_parent=/bodyset/talus_l translation=(0 0 0)
    WeldJoint subtalar_l: socket_parent_frame=talus_l_offset socket_child_frame=calcn_l_offset
      PhysicalOffsetFrame talus_l_offset: socket_parent=/bodyset/talus_l translation=(-0.0620508 -0.0531864 0.0101307)
      PhysicalOffsetFrame calcn_l_offset: socket_parent=/bodyset/calcn_l translation=(0 0 0)
    WeldJoint mtp_l: socket_parent_frame=calcn_l_offset socket_child_frame=toes_l_offset
      PhysicalOffsetFrame calcn_l_offset: socket_parent=/bodyset/calcn_l translation=(0.18382 -0.00205386 0.00102692)
      PhysicalOffsetFrame toes_l_offset: socket_parent=/bodyset/toes_l translation=(0 0 0)
    WeldJoint back: socket_parent_frame=pelvis_offset socket_child_frame=torso_offset
      PhysicalOffsetFrame pelvis_offset: socket_parent=/bodyset/pelvis translation=(-0.0996762 0.0806714 0)
          orientation=(-0.174533 0.300603 0)
      PhysicalOffsetFrame torso_offset: socket_parent=/bodyset/torso translation=(0 0 0)
    WeldJoint acromial_r: socket_parent_frame=torso_offset socket_child_frame=humerus_r_offset
      PhysicalOffsetFrame torso_offset: socket_parent=/bodyset/torso translation=(0.00373526 0.419825 0.191266)
          orientation=(-0.8 0 -1)
      PhysicalOffsetFrame humerus_r_offset: socket_parent=/bodyset/humerus_r translation=(0 0 0)
    WeldJoint elbow_r: socket_parent_frame=humerus_r_offset socket_child_frame=ulna_r_offset
      PhysicalOffsetFrame humerus_r_offset: socket_parent=/bodyset/humerus_r
          translation=(0.0139852 -0.304594 -0.0102091) orientation=(0 0 0.8)
      PhysicalOffsetFrame ulna_r_offset: socket_parent=/bodyset/ulna_r translation=(0 0 0)
    WeldJoint radioulnar_r: socket_parent_frame=ulna_r_offset socket_child_frame=radius_r_offset
      PhysicalOffsetFrame ulna_r_offset: socket_parent=/bodyset/ulna_r translation=(-0.00811802 -0.0156966 0.0314765)
      PhysicalOffsetFrame radius_r_offset: socket_parent=/bodyset/radius_r translation=(0 0 0)
    WeldJoint radius_hand_r: socket_parent_frame=radius_r_offset socket_child_frame=hand_r_offset
      PhysicalOffsetFrame radius_r_offset: socket_parent=/bodyset/radius_r translation=(-0.0106161 -0.270609 0.0164243)
      PhysicalOffsetFrame hand_r_offset: socket_parent=/bodyset/hand_r translation=(0 0 0)
    WeldJoint acromial_l: socket_parent_frame=torso_offset socket_child_frame=humerus_l_offset
      PhysicalOffsetFrame torso_offset: socket_parent=/bodyset/torso translation=(0.00373526 0.419825 -0.191266)
          orientation=(0.8 0 1)
      PhysicalOffsetFrame humerus_l_offset: socket_parent=/bodyset/humerus_l translation=(0 0 0)
    WeldJoint elbow_l: socket_parent_frame=humerus_l_offset socket_child_frame=ulna_l_offset
      PhysicalOffsetFrame humerus_l_offset: socket_parent=/bodyset/humerus_l
          translation=(0.0139852 -0.304594 0.0102091) orientation=(-0.3 0 1.2)
      PhysicalOffsetFrame ulna_l_offset: socket_parent=/bodyset/ulna_l translation=(0 0 0)
    WeldJoint radioulnar_l: socket_parent_frame=ulna_l_offset socket_child_frame=radius_l_offset
      PhysicalOffsetFrame ulna_l_offset: socket_parent=/bodyset/ulna_l translation=(-0.00811802 -0.0156966 -0.0314765)
          orientation=(0 -1.7 0)
      PhysicalOffsetFrame radius_l_offset: socket_parent=/bodyset/radius_l translation=(0 0 0)
    WeldJoint radius_hand_l: socket_parent_frame=radius_l_offset socket_child_frame=hand_l_offset
      PhysicalOffsetFrame radius_l_offset: socket_parent=/bodyset/radius_l
          translation=(-0.0106161 -0.270609 -0.0164243)
      PhysicalOffsetFrame hand_l_offset: socket_parent=/bodyset/hand_l translation=(0 0 0)
    WeldJoint goalie_ground: socket_parent_frame=ground_offset socket_child_frame=goalie_offset
      PhysicalOffsetFrame ground_offset: socket_parent=/ground translation=(6 0 -1) orientation=(0 3.14159 0)
      PhysicalOffsetFrame goalie_offset: socket_parent=/bodyset/goalie translation=(0 0 0)
    FreeJoint free: socket_parent_frame=ground_offset socket_child_frame=ball_offset
      Coordinate ball_rx: default_value=0 range=(-1.570796 1.570796) clamped=false
      Coordinate ball_ry: default_value=0 range=(-1.570796 1.570796) clamped=false
      Coordinate ball_rz: default_value=1e-8 range=(-1.570796 1.570796) clamped=false
      Coordinate ball_tx: default_value=0.7 range=(-1 10) clamped=false
      Coordinate ball_ty: default_value=0.12 range=(-1 3) clamped=false
      Coordinate ball_tz: default_value=-0.05 range=(-1 3) clamped=false
      PhysicalOffsetFrame ground_offset: socket_parent=/ground translation=(0 0 0)
      PhysicalOffsetFrame ball_offset: socket_parent=/bodyset/ball translation=(0 0 0)
  ConstraintSet:
    CoordinateCouplerConstraint pat_angle_r: independent_coordinate_names=knee_angle_r
        dependent_coordinate_name=knee_angle_pat_r scale_factor=1
        coupled_coordinates_function=LinearFunction(coefficients=1 0)
  ForceSet:
    Thelen2003Muscle [values shared by the 9 below unless stated]: min_control=0.01 optimal_force=1
        max_contraction_velocity=10 FmaxTendonStrain=0.033 FmaxMuscleStrain=0.6 KshapeActive=0.5 KshapePassive=4 Af=0.3
        Flen=1.8 activation_time_constant=0.01 [seconds] deactivation_time_constant=0.04 [seconds]
    Thelen2003Muscle bifemlh_r: max_isometric_force=2594 optimal_fiber_length=0.1282385 tendon_slack_length=0.383539
        pennation_angle_at_optimal=0 [radians]
      PathPoint P1: pelvis (-0.131752 -0.107287 0.0726333)
      PathPoint P2: tibia_r (-0.0338242 -0.0404542 0.0330713)
      PathPoint P3: tibia_r (-0.0262952 -0.0632659 0.0385439)
    Thelen2003Muscle bifemsh_r: max_isometric_force=960 optimal_fiber_length=0.2008373 tendon_slack_length=0.1033209
        pennation_angle_at_optimal=0.4014257
      PathPoint P1: femur_r (0.0058689 -0.247785 0.0274665)
      PathPoint P2: tibia_r (-0.0338242 -0.0404542 0.0330713)
      PathPoint P3: tibia_r (-0.0262952 -0.0632659 0.0385439)
    Thelen2003Muscle glut_max2_r: max_isometric_force=1944 optimal_fiber_length=0.1629139 tendon_slack_length=0.1407488
        pennation_angle_at_optimal=0
      PathPoint P1: pelvis (-0.141103 0.0184094 0.058889)
      PathPoint P2: pelvis (-0.143928 -0.0543913 0.0956031)
      PathPoint P3: femur_r (-0.050003 -0.0622103 0.0343917)
      PathPoint P4: femur_r (-0.018311 -0.119256 0.0491814)
    Thelen2003Muscle psoas_r: max_isometric_force=2342 optimal_fiber_length=0.1074282 tendon_slack_length=0.1718851
        pennation_angle_at_optimal=0.1396263
      PathPoint P1: pelvis (-0.0676753 0.0927789 0.030229)
      PathPoint P2: pelvis (-0.0248945 -0.0596212 0.0793903)
      ConditionalPathPoint P3: pelvis (-0.0301244 -0.0842019 0.0853524) socket_coordinate=/jointset/hip_r/hip_flexion_r
          range=(-1.5708 0.785398) [radians]
      PathPoint P4: femur_r (0.00187804 -0.0595106 0.00446036)
      PathPoint P5: femur_r (-0.0220671 -0.0700747 0.0122073)
    Thelen2003Muscle rect_fem_r: max_isometric_force=1169 optimal_fiber_length=0.1328739 tendon_slack_length=0.3613238
        pennation_angle_at_optimal=0.08726646
      PathPoint P1: pelvis (-0.0308566 -0.0325302 0.101251)
      ConditionalPathPoint P2: femur_r (0.0392043 -0.473033 0.00223019) socket_coordinate=/jointset/knee_r/knee_angle_r
          range=(-2.61799 -1.45997)
      MovingPathPoint P3: tibia_r socket_x_coordinate=/jointset/knee_r/knee_angle_r
          socket_y_coordinate=/jointset/knee_r/knee_angle_r socket_z_coordinate=/jointset/knee_r/knee_angle_r
        x_location: MultiplierFunction: scale=1
          SimmSpline: x=(-2.0944 -1.99997 -1.5708 -1.45752 -1.39626 -1.0472 -0.698132 -0.526391 -0.349066 -0.174533 0 0.00017453 0.00034907 0.0279253 0.0872665 0.174533 2.0944)
              y=(0.0175082 0.0202202 0.0309116 0.0333257 0.0345676 0.0410942 0.0474297 0.0506691 0.0543783 0.0600407 0.0693987 0.0694092 0.0694196 0.0711413 0.075283 0.0823732 0.0644437)
        y_location: MultiplierFunction: scale=1
          SimmSpline: x=(-2.0944 -1.99997 -1.5708 -1.45752 -1.39626 -1.0472 -0.698132 -0.526391 -0.349066 -0.174533 0 0.00017453 0.00034907 0.0279253 0.0872665 0.174533 2.0944)
              y=(0.0263083 0.0267012 0.0282215 0.0284073 0.0284468 0.0280015 0.0272362 0.026795 0.0263174 0.025581 0.0235803 0.0235774 0.0235745 0.0230617 0.0215479 0.0179296 -0.0757138)
        z_location: MultiplierFunction: scale=1
          SimmSpline: x=(-2.0944 0.1745) y=(0.00157322 0.00157322)
    Thelen2003Muscle vas_int_r: max_isometric_force=4530 optimal_fiber_length=0.1261733 tendon_slack_length=0.136786
        pennation_angle_at_optimal=0.05235988
      PathPoint P1: femur_r (0.0340396 -0.225835 0.0363872)
      PathPoint P2: femur_r (0.0393216 -0.244616 0.0334527)
      ConditionalPathPoint P3: femur_r (0.0402607 -0.473033 0.00645579) socket_coordinate=/jointset/knee_r/knee_angle_r
          range=(-2.61799 -1.42)
      MovingPathPoint P4: tibia_r socket_x_coordinate=/jointset/knee_r/knee_angle_r
          socket_y_coordinate=/jointset/knee_r/knee_angle_r socket_z_coordinate=/jointset/knee_r/knee_angle_r
        x_location: MultiplierFunction: scale=1
          SimmSpline: x=(-2.0944 -1.99997 -1.5708 -1.45752 -1.39626 -1.0472 -0.698132 -0.526391 -0.349066 -0.174533 0 0.00017453 0.00034907 0.0279253 0.0872665 0.174533 2.0944)
              y=(0.00929694 0.0120089 0.022704 0.0251187 0.0263607 0.0328932 0.0392704 0.0425567 0.0463615 0.0522856 0.0623256 0.0623371 0.0623486 0.0642454 0.0688531 0.0769044 0.0729095)
        y_location: MultiplierFunction: scale=1
          SimmSpline: x=(-2.0944 -1.99997 -1.5708 -1.45752 -1.39626 -1.0472 -0.698132 -0.526391 -0.349066 -0.174533 0 0.00017453 0.00034907 0.0279253 0.0872665 0.174533 2.0944)
              y=(0.0287664 0.0291593 0.0306917 0.0308797 0.0309195 0.0304938 0.0298616 0.0295622 0.0293503 0.0292314 0.0284217 0.0284203 0.0284189 0.0281523 0.0272157 0.0245296 -0.0770547)
        z_location: MultiplierFunction: scale=1
          SimmSpline: x=(-2.0944 2.0944) y=(0.00202271 0.00202271)
    Thelen2003Muscle med_gas_r: max_isometric_force=2241 optimal_fiber_length=0.1031128 tendon_slack_length=0.4124513
        pennation_angle_at_optimal=0.296706
      PathPoint P1: femur_r (-0.0223018 -0.461178 -0.0275838)
      ConditionalPathPoint P2: femur_r (-0.0352134 -0.472094 -0.0302835)
          socket_coordinate=/jointset/knee_r/knee_angle_r range=(-0.785398 0.174533)
      PathPoint P3: calcn_r (0 0.0318348 -0.00544272)
    Thelen2003Muscle soleus_r: max_isometric_force=5137 optimal_fiber_length=0.092647 tendon_slack_length=0.2547793
        pennation_angle_at_optimal=0.4363323
      PathPoint P1: tibia_r (-0.00269695 -0.172268 0.00797847)
      PathPoint P2: calcn_r (0 0.0318348 -0.00544272)
    Thelen2003Muscle tib_ant_r: min_control=0.02 max_isometric_force=1759 optimal_fiber_length=0.1100528
        tendon_slack_length=0.2504262 pennation_angle_at_optimal=0.08726646
      PathPoint P1: tibia_r (0.0201147 -0.182493 0.0129229)
      PathPoint P2: tibia_r (0.0369707 -0.443985 -0.01989)
      PathPoint P3: calcn_r (0.11974 0.0182793 -0.0313213)
    CoordinateLimitForce knee_stop_r: coordinate=knee_angle_r upper_stiffness=200 [N*m/degree] upper_limit=0 [degrees]
        lower_stiffness=50 [N*m/degree] lower_limit=-120 [degrees] damping=0.1 transition=2 [degrees]
    CoordinateLimitForce ankle_stop_r: coordinate=ankle_angle_r upper_stiffness=100 upper_limit=38 lower_stiffness=100
        lower_limit=-45 damping=0.05 transition=2
    HuntCrossleyForce foot_ground: transition_velocity=0.01
      ContactParametersSet contact_parameters:
        ContactParameters: geometry=(ground ball_big_toe_r tip_big_toe_r small_toe_r) stiffness=10000000
            dissipation=0.005 static_friction=0.2 dynamic_friction=0.1 viscous_friction=0.05
    HuntCrossleyForce foot_ball: transition_velocity=0.01
      ContactParametersSet contact_parameters:
        ContactParameters: geometry=(ball ball_big_toe_r tip_big_toe_r small_toe_r) stiffness=1000000 dissipation=0.005
            static_friction=0.7 dynamic_friction=0.5 viscous_friction=0.1
    HuntCrossleyForce ball_ground: transition_velocity=0.01
      ContactParametersSet contact_parameters:
        ContactParameters: geometry=(ground ball) stiffness=1000000 dissipation=0.1 static_friction=0.7
            dynamic_friction=0.4 viscous_friction=0.1
    HuntCrossleyForce ball_net: transition_velocity=0.1
      ContactParametersSet contact_parameters:
        ContactParameters: geometry=(back_stop ball) stiffness=50000 dissipation=0.2 static_friction=0.7
            dynamic_friction=0.4 viscous_friction=0.3
    HuntCrossleyForce goalie_ball: transition_velocity=0.1
      ContactParametersSet contact_parameters:
        ContactParameters: geometry=(ball goalie_head goalie_hand_r goalie_hand_l goalie_torso goalie_foot_r goalie_foot_l goalie_knee_r goalie_knee_l goalie_elbow_r goalie_elbow_l)
            stiffness=500000 dissipation=0.2 static_friction=0.7 dynamic_friction=0.4 viscous_friction=0.3
  ContactGeometrySet:
    ContactHalfSpace ground: socket_frame=/ground location=(0 0 0) orientation=(0 0 -1.570796)
    ContactSphere ball: socket_frame=/bodyset/ball location=(0.01 0.01 -0.005) radius=0.13
    ContactSphere ball_big_toe_r: socket_frame=/bodyset/toes_r location=(-0.005 0.006 -0.03) radius=0.04
    ContactSphere tip_big_toe_r: socket_frame=/bodyset/toes_r location=(0.07 0 0) radius=0.04
    ContactSphere small_toe_r: socket_frame=/bodyset/toes_r location=(-0.045 0.006 0.045) radius=0.04
    ContactHalfSpace back_stop: socket_frame=/ground location=(8.15 0 0)
    ContactSphere goalie_head: socket_frame=/bodyset/goalie location=(0.05 1.675 0) radius=0.2
    ContactSphere goalie_hand_r: socket_frame=/bodyset/goalie location=(0.175 1.35 0.75) radius=0.15
    ContactSphere goalie_hand_l: socket_frame=/bodyset/goalie location=(0.175 1.35 -0.75) radius=0.15
    ContactSphere goalie_torso: socket_frame=/bodyset/goalie location=(0 1.1 0) radius=0.3
    ContactSphere goalie_foot_r: socket_frame=/bodyset/goalie location=(0.1 0.05 0.2) radius=0.15
    ContactSphere goalie_foot_l: socket_frame=/bodyset/goalie location=(0.1 0.05 -0.2) radius=0.15
    ContactSphere goalie_knee_r: socket_frame=/bodyset/goalie location=(0 0.5 0.175) radius=0.1
    ContactSphere goalie_knee_l: socket_frame=/bodyset/goalie location=(0 0.5 -0.175) radius=0.1
    ContactSphere goalie_elbow_r: socket_frame=/bodyset/goalie location=(0.05 1.45 0.4) radius=0.1
    ContactSphere goalie_elbow_l: socket_frame=/bodyset/goalie location=(0.05 1.45 -0.4) radius=0.1
  ProbeSet:
    Umberger2010MuscleMetabolicsProbe metabolics: probe_operation=value activation_maintenance_rate_on=true
        shortening_rate_on=true basal_rate_on=false mechanical_work_rate_on=true report_total_metabolics_only=false
      Umberger2010MuscleMetabolicsProbe_MetabolicMuscleParameterSet:
        Umberger2010MuscleMetabolicsProbe_MetabolicMuscleParameter bifemlh_r: ratio_slow_twitch_fibers=0.5425
            use_provided_muscle_mass=false
        Umberger2010MuscleMetabolicsProbe_MetabolicMuscleParameter bifemsh_r: ratio_slow_twitch_fibers=0.529
            use_provided_muscle_mass=false
        Umberger2010MuscleMetabolicsProbe_MetabolicMuscleParameter glut_max2_r: ratio_slow_twitch_fibers=0.55
            use_provided_muscle_mass=false
        Umberger2010MuscleMetabolicsProbe_MetabolicMuscleParameter psoas_r: ratio_slow_twitch_fibers=0.5
            use_provided_muscle_mass=false
        Umberger2010MuscleMetabolicsProbe_MetabolicMuscleParameter rect_fem_r: ratio_slow_twitch_fibers=0.3865
            use_provided_muscle_mass=false
        Umberger2010MuscleMetabolicsProbe_MetabolicMuscleParameter vas_int_r: ratio_slow_twitch_fibers=0.543
            use_provided_muscle_mass=false
        Umberger2010MuscleMetabolicsProbe_MetabolicMuscleParameter med_gas_r: ratio_slow_twitch_fibers=0.566
            use_provided_muscle_mass=false
        Umberger2010MuscleMetabolicsProbe_MetabolicMuscleParameter soleus_r: ratio_slow_twitch_fibers=0.803
            use_provided_muscle_mass=false
        Umberger2010MuscleMetabolicsProbe_MetabolicMuscleParameter tib_ant_r: ratio_slow_twitch_fibers=0.7
            use_provided_muscle_mass=false
