# OpenSim document version 40000
AnalyzeTool fwd_cyclingleg:
  replace_force_set: false
  results_directory: muscled_up_analyses
  output_precision: 8
  initial_time: 0
  final_time: 3
  solve_for_equilibrium_for_auxiliary_states: true
  maximum_number_of_integrator_steps: 20000
  maximum_integrator_step_size: 1
  minimum_integrator_step_size: 1e-8
  integrator_error_tolerance: 1e-5
  lowpass_cutoff_frequency_for_coordinates: -1
  AnalysisSet Analyses:
    ForceReporter: start_time=0 end_time=3 step_interval=1 in_degrees=true include_constraint_forces=true
    MuscleAnalysis: start_time=0 end_time=3 step_interval=1 in_degrees=true muscle_list=all
        moment_arm_coordinate_list=all compute_moments=false
    Kinematics: start_time=0 end_time=3 step_interval=1 in_degrees=true
    PointKinematics: start_time=0 end_time=3 step_interval=1 in_degrees=true body_name=ground
        relative_to_body_name=calcn_r point_name=PedalClip point=(0.17 -0.027 0.017)
