# OpenSim document version 40000
ForceSet CMC_leg_Actuators:
  # Actuators on the base segement are called Residual actuators
  # whose forces account for the errors in the model, its kinematic
  # that do not balance with experimental ground reaction forces
  PointActuator FX: body=pelvis point=(-0.0739512 0 0) point_is_global=false direction=(1 0 0) force_is_global=true
      optimal_force=1
  PointActuator FY: body=pelvis point=(-0.0739512 0 0) point_is_global=false direction=(0 1 0) force_is_global=true
      optimal_force=2
  TorqueActuator MX: bodyA=pelvis bodyB=ground torque_is_global=true axis=(1 0 0) optimal_force=500
  TorqueActuator MY: bodyA=pelvis bodyB=ground torque_is_global=true axis=(0 1 0) optimal_force=500
  TorqueActuator MZ: bodyA=pelvis bodyB=ground torque_is_global=true axis=(0 0 1) optimal_force=500
  # Actuators on the Coordinates are called Reserve actuators
  # and are used the drive the model when the model excludes its muscles (i.e. RRA)
  # or when muscles are insufficient to track desired kinematics (CMC)
  CoordinateActuator crank_angle: coordinate=crank_angle optimal_force=1
  CoordinateActuator pelvis_tilt: coordinate=pelvis_tilt optimal_force=500
  CoordinateActuator pelvis_rotation: coordinate=pelvis_rotation optimal_force=500
  CoordinateActuator pelvis_tx: coordinate=pelvis_tx optimal_force=1
  CoordinateActuator pelvis_ty: coordinate=pelvis_ty optimal_force=1
  CoordinateActuator pelvis_tz: coordinate=pelvis_tz optimal_force=500
  CoordinateActuator hip_angle_r: coordinate=hip_angle_r optimal_force=500
  CoordinateActuator hip_adduction_r: coordinate=hip_adduction_r optimal_force=500
  CoordinateActuator hip_rotation_r: coordinate=hip_rotation_r optimal_force=500
  CoordinateActuator knee_angle_r: coordinate=knee_angle_r optimal_force=500
  CoordinateActuator mtp_angle_r: coordinate=mtp_angle_r optimal_force=1
