# OpenSim document version 40000
CMC_TaskSet CMC_leg_Tracking_Tasks:
  CMC_Joint [values shared by the 5 below unless stated]: active=(true false false) kp=100 kv=20
  CMC_Joint crank_angle: weight=50 coordinate=crank_angle
  CMC_Joint pelvis_tilt: weight=100 coordinate=pelvis_tilt
  CMC_Joint pelvis_list: weight=100 coordinate=pelvis_list
  CMC_Joint pelvis_rotation: weight=1 coordinate=pelvis_rotation
  CMC_Joint hip_adduction_r: weight=1 coordinate=hip_adduction_r
