# OpenSim document version 40000
CMCTool cyclingleg:
  replace_force_set: false
  force_set_files: ../full_workflow/Computed_Muscle_Control/inversion/cyclingleg_Actuators8e.xml
  results_directory: ../full_workflow/Results/Saddle_x_-0.1_y_-0.5/CMC/Trial5
  output_precision: 8
  initial_time: 0
  final_time: 3
  solve_for_equilibrium_for_auxiliary_states: true
  maximum_number_of_integrator_steps: 20000
  maximum_integrator_step_size: 1
  minimum_integrator_step_size: 1e-8
  integrator_error_tolerance: 1e-5
  external_loads_file: ../full_workflow/Results/Saddle_x_-0.1_y_-0.5/SFK/pedal_clip_forces.xml
  desired_kinematics_file: ../full_workflow/Results/Saddle_x_-0.1_y_-0.5/SFK/sfk_leg_Kinematics_q.sto
  task_set_file: ../full_workflow/Computed_Muscle_Control/inversion/cyclingleg_kinematics_Tracking_Tasks8d.xml
  lowpass_cutoff_frequency: -1
  cmc_time_window: 0.01
  use_fast_optimization_target: true
  optimizer_algorithm: ipopt
  numerical_derivative_step_size: 1e-5
  optimization_convergence_tolerance: 1e-5
  optimizer_max_iterations: 1000
  optimizer_print_level: 0
  use_verbose_printing: false
  AnalysisSet Analyses:
    ProbeReporter MetabolicsReporter
