# OpenSim document version 40000
CMCTool CMC_leg:
  model_file: ccmc_cyclingleg_probed__x_-0.11_y_-0.06.osim
  replace_force_set: false
  force_set_files: cmc_leg_Actuators.xml
  results_directory: ../Results/Saddle_x_-0.11_y_-0.06/CMC
  output_precision: 8
  initial_time: 0.03
  final_time: 1
  solve_for_equilibrium_for_auxiliary_states: true
  maximum_number_of_integrator_steps: 20000
  maximum_integrator_step_size: 1
  minimum_integrator_step_size: 1e-8
  integrator_error_tolerance: 1e-5
  external_loads_file: ../Results/Saddle_x_-0.11_y_-0.06/SFK/pedal_clip_forces_x_-0.11_y_-0.06.xml
  desired_kinematics_file: ../Results/Saddle_x_-0.11_y_-0.06/SFK/sfk_cyclingleg_x_-0.11_y_-0.06_Kinematics_q.sto
  task_set_file: cmc_leg_Tracking_Tasks.xml
  lowpass_cutoff_frequency: -1
  cmc_time_window: 0.01
  use_fast_optimization_target: false
  optimizer_algorithm: ipopt
  numerical_derivative_step_size: 1e-5
  optimization_convergence_tolerance: 1e-5
  optimizer_max_iterations: 1000
  optimizer_print_level: 2
  use_verbose_printing: true
  AnalysisSet Analyses:
    ProbeReporter MetabolicsReporter
