# OpenSim document version 40000
ForceSet CMC_leg_Actuators:
  # Actuators on the base segement are called Residual actuators
  # whose forces account for the errors in the model, its kinematic
  # that do not balance with experimental ground reaction forces
  # Actuators on the Coordinates are called Reserve actuators
  # and are used the drive the model when the model excludes its muscles (i.e. RRA)
  # or when muscles are insufficient to track desired kinematics (CMC)
  CoordinateActuator crank_angle: coordinate=crank_angle optimal_force=175
  CoordinateActuator hip_angle_r: coordinate=hip_angle_r optimal_force=15
  CoordinateActuator hip_rotation_r: coordinate=hip_rotation_r optimal_force=15
  CoordinateActuator hip_adduction_r: coordinate=hip_rotation_r optimal_force=15
  CoordinateActuator knee_angle_r: coordinate=knee_angle_r optimal_force=50
  CoordinateActuator ankle_angle_r: coordinate=knee_angle_r optimal_force=15
  CoordinateActuator mtp_angle_r: coordinate=mtp_angle_r optimal_force=1
