# OpenSim document version 40000
CMC_TaskSet CMC_leg_Tracking_Tasks:
  CMC_Joint [values shared by the 5 below unless stated]: active=(true false false) kp=100 kv=20
  CMC_Joint crank_angle: weight=500 coordinate=crank_angle
  CMC_Joint hip_angle_r: weight=250 coordinate=hip_angle_r
  CMC_Joint knee_angle_r: weight=500 coordinate=knee_angle_r
  CMC_Joint ankle_angle_r: weight=50 coordinate=ankle_angle_r
  CMC_Joint mtp_angle_r: weight=1 coordinate=mtp_angle_r
