# OpenSim document version 40000
ForwardTool sfk_cyclingleg_x_-0.09_y_-0.04:
  replace_force_set: false
  results_directory: ../Results/Saddle_x_-0.09_y_-0.04/SFK
  output_precision: 8
  initial_time: 0
  final_time: 1
  solve_for_equilibrium_for_auxiliary_states: true
  maximum_number_of_integrator_steps: 20000
  maximum_integrator_step_size: 1
  minimum_integrator_step_size: 1e-8
  integrator_error_tolerance: 1e-5
  use_specified_dt: false
  AnalysisSet Analyses:
    Kinematics: start_time=0 end_time=1 step_interval=1 in_degrees=true
    MuscleAnalysis: start_time=0 end_time=1 step_interval=1 in_degrees=true muscle_list=all
        moment_arm_coordinate_list=all compute_moments=false
    ForceReporter: start_time=0 end_time=1 step_interval=1 in_degrees=true include_constraint_forces=true
