# OpenSim document version 40000
AnalyzeTool CMC_leg:
  replace_force_set: false
  force_set_files: Computed_Muscle_Control/cmc_leg_Actuators.xml
  results_directory: Results/Saddle_x_-0.1_y_-0.5/SO/Trial1
  output_precision: 8
  initial_time: 0
  final_time: 3
  solve_for_equilibrium_for_auxiliary_states: false
  maximum_number_of_integrator_steps: 20000
  maximum_integrator_step_size: 1
  minimum_integrator_step_size: 1e-8
  integrator_error_tolerance: 1e-5
  external_loads_file: Results/Saddle_x_-0.1_y_-0.5/SFK/pedal_clip_forces.xml
  coordinates_file: Results/Saddle_x_-0.1_y_-0.5/SFK/sfk_leg_Kinematics_q.sto
  lowpass_cutoff_frequency_for_coordinates: -1
  AnalysisSet Analyses:
    StaticOptimization: start_time=0 end_time=3 step_interval=1 in_degrees=true use_model_force_set=true
        activation_exponent=2 use_muscle_physiology=true optimizer_convergence_criterion=0.0001
        optimizer_max_iterations=100
