# OpenSim document version 30000
CMC_TaskSet cyclingleg_CEC:
  CMC_Joint [values shared by the 8 below unless stated]: active=(true false false) kp=100 kv=20
  CMC_Joint crank_angle: weight=200 coordinate=crank_angle
  CMC_Joint pelvis_rotation: weight=100 coordinate=pelvis_rotation
  CMC_Joint pelvis_tz: weight=1 coordinate=pelvis_tz/coordinate>
  CMC_Joint hip_rotation_r: weight=200 coordinate=hip_rotation_r
  CMC_Joint hip_adduction_r: weight=200 coordinate=hip_adduction_r
  CMC_Joint hip_angle_r: weight=1 coordinate=hip_angle_r
  CMC_Joint knee_angle_r: weight=200 coordinate=knee_angle_r
  CMC_Joint mtp_angle_r: weight=1 coordinate=mtp_angle_r
