# OpenSim document version 40000
MarkerSet:
  Marker RASI: pelvis (0.00201364 -0.00150927 0.129764)
  Marker LASI: pelvis (0.00201364 -0.00150927 -0.129764)
  Marker RPSI: pelvis (-0.168565 0.0330764 0.0507053)
  Marker LPSI: pelvis (-0.168565 0.0330764 -0.0507053)
  Marker RTHI: femur_r (0.00109421 -0.266721 0.0939314)
  Marker RKNE: femur_r (0.00196336 -0.470462 0.0554672)
  Marker RTIB: tibia_r (-0.00512482 -0.280401 0.0550595)
  Marker RANK: tibia_r (-0.00769151 -0.465157 0.0616636)
  Marker RHEE: calcn_r (-0.0162173 0.0387516 -0.00268731)
  Marker RPED: pedal_r (0.00110124 0.00058495 0.0260081)
  Marker RTOE: calcn_r (0.186576 0.0179504 0.0014454)
