# OpenSim document version 40000
AnalyzeTool cyclingleg:
  model_file: C:/Users/david/GitHub/spec-opensim/student-project-ME485/docman-cyclingmodel-1812/../docman-cyclingmodel-1811/simplified_cycling_modelV4.osim
  replace_force_set: false
  results_directory: C:/Users/david/GitHub/spec-opensim/student-project-ME485/docman-cyclingmodel-1812/../results-4-marker-locations
  output_precision: 8
  initial_time: 0
  final_time: 1
  solve_for_equilibrium_for_auxiliary_states: false
  maximum_number_of_integrator_steps: 20000
  maximum_integrator_step_size: 1
  minimum_integrator_step_size: 1e-8
  integrator_error_tolerance: 1e-5
  lowpass_cutoff_frequency_for_coordinates: -1
  AnalysisSet Analyses:
    PointKinematics [values shared by the 11 below unless stated]: start_time=0 end_time=1 step_interval=1
        in_degrees=true relative_to_body_name=none
    PointKinematics: body_name=pelvis point_name=RASI point=(0.00201364 -0.00150927 0.129764)
    PointKinematics: body_name=femur_r point_name=RKNE point=(0.00196336 -0.470462 0.00554672)
    PointKinematics: body_name=pelvis point_name=LASI point=(0.00201364 -0.00150927 -0.129764)
    PointKinematics: body_name=pelvis point_name=LPSI point=(-0.168565 0.0330764 -0.0507053)
    PointKinematics: body_name=pelvis point_name=RPSI point=(-0.168565 0.0330764 0.0507053)
    PointKinematics: body_name=femur_r point_name=RTHI point=(0.00109421 -0.266721 0.0939314)
    PointKinematics: body_name=tibia_r point_name=RTIB point=(-0.00512482 -0.280401 0.0550595)
    PointKinematics: body_name=tibia_r point_name=RANK point=(-0.00769151 -0.465157 0.0616636)
    PointKinematics: body_name=calcn_r point_name=RHEE point=(-0.0162173 0.0387516 -0.00268731)
    PointKinematics: body_name=calcn_r point_name=RTOE point=(0.186576 0.0179504 0.0014454)
    PointKinematics: body_name=pedal_r point_name=RPED point=(0.0440023 0.170174 -0.0289919)
