# OpenSim document version 30516
Model cyclingleg:
  gravity: 0 -9.80665 0
  length_units: meters
  force_units: N
  credits:
    Crank, pedals and knee by A. Seth, leg model based on Delp S.L., Loan J.P., Hoy M.G., Zajac F.E., Topp E.L., Rosen J.M., Thelen D.G., Anderson F.C., Seth A., Reinbolt J.A.
  publications:
    Notes: 2D, 3 DOF leg model created by D.G. Thelen, Univ. of Wisconsin-Madison, and Jeff Reinbolt, Ajay Seth, Frank C. Anderson, and Scott L. Delp, Stanford University. Lower extremity joint defintions based on Delp et al. (1990). Planar knee model of Yamaguchi and Zajac (1989). Number of muscles was reduced by Reinbolt and Anderson to improve simulation speed for demonstrations and is not intended to be used in research. Delp, S.L., Loan, J.P., Hoy, M.G., Zajac, F.E., Topp E.L., Rosen, J.M.: An interactive graphics-based model of the lower extremity to study orthopaedic surgical procedures, IEEE Transactions on Biomedical Engineering, vol. 37, pp. 757-767, 1990. Yamaguchi G.T., Zajac F.E.: A planar model of the knee joint to characterize the knee extensor mechanism." J . Biomecl7. vol. 21. pp. 1-10. 1989. Anderson F.C., Pandy M.G.: A dynamic optimization solution for vertical jumping in three dimensions. Computer Methods in Biomechanics and Biomedical Engineering 2:201-231, 1999. Anderson F.C., Pandy M.G.: Dynamic optimization of human walking. Journal of Biomechanical Engineering 123:381-390, 2001.
  Ground: meshes=
  BodySet:
    Body crank: mass=0.5 [kg] mass_center=(0 0 0) inertia=(0.01 0.01 0.05 0 0 0) meshes=sphere.vtp
    Body bottom_bracket: mass=0.25 mass_center=(0 0 0) inertia=(0.01 0.01 0.05 0 0 0) meshes=cylinder.vtp
    Body crank_arm: mass=0.2 mass_center=(0 0 0) inertia=(0.01 0.01 0.05 0 0 0) meshes=cylinder.vtp
    Body pedal_r: mass=0.2 mass_center=(0 0 0) inertia=(0.01 0.01 0.05 0 0 0) meshes=box.vtp
    Body pelvis: mass=10.75379 mass_center=(-0.0739512 0 0) inertia=(0.1027 0.0870155 0.0578439 0 0 0)
        meshes=(sacrum.vtp pelvis.vtp l_pelvis.vtp)
    Body femur_r: mass=8.549266 mass_center=(0 -0.199543 0) inertia=(0.169564 0.0444489 0.178809 0 0 0)
        meshes=femur_r.vtp
    Body tibia_r: mass=4.674042 mass_center=(0 -0.2098 0) inertia=(0.0802351 0.00811903 0.0813495 0 0 0)
        meshes=(tibia_r.vtp fibula_r.vtp)
    Body patella_r: mass=0.09191376 mass_center=(0 0 0) inertia=(0.00110296 0.00110296 0.00110296 0 0 0) meshes=pat.vtp
    Body talus_r: mass=0.1260686 mass_center=(0 0 0) inertia=(0.00202166 0.00202166 0.00202166 0 0 0) meshes=talus.vtp
    Body calcn_r: mass=1.072248 mass_center=(0.102693 0.0308079 0) inertia=(0.00090462 0.00361848 0.00361848 0 0 0)
        meshes=foot.vtp
    Body toes_r: mass=0.1861423 mass_center=(0.0359425 0.00616157 -0.0184847) inertia=(0 0 0.00090462 0 0 0)
        meshes=bofoot.vtp
  JointSet:
    CustomJoint bb: socket_parent_frame_connectee_name=ground_offset socket_child_frame_connectee_name=../crank
      Coordinate crank_angle: default_value=-0.176887 range=(-12.5664 12.5664) clamped=false
      PhysicalOffsetFrame ground_offset: socket_parent_connectee_name=../../ground translation=(0 0 -0.1) [meters]
      SpatialTransform: axes_held_at_zero=(rotation2 rotation3 translation1 translation2 translation3)
        TransformAxis rotation1: coordinates=crank_angle axis=(0 0 1) LinearFunction(coefficients=1 0)
    WeldJoint bottombracket: socket_parent_frame_connectee_name=crank_offset
        socket_child_frame_connectee_name=../bottom_bracket
      PhysicalOffsetFrame crank_offset: socket_parent_connectee_name=../../crank translation=(0 0 -0.07)
          orientation=(1.571 0 0) [radians]
    WeldJoint crankarm: socket_parent_frame_connectee_name=crank_offset socket_child_frame_connectee_name=../crank_arm
      PhysicalOffsetFrame crank_offset: socket_parent_connectee_name=../../crank translation=(0 0.0875 0.005)
    CustomJoint spindle: socket_parent_frame_connectee_name=crank_arm_offset
        socket_child_frame_connectee_name=../pedal_r
      Coordinate pedal_angle_r: default_value=0.08564315 range=(-12.5664 12.5664) clamped=false
          is_free_to_satisfy_constraints=true
      PhysicalOffsetFrame crank_arm_offset: socket_parent_connectee_name=../../crank_arm translation=(0 0.0875 0.04)
      SpatialTransform: axes_held_at_zero=(rotation2 rotation3 translation1 translation2 translation3)
        TransformAxis rotation1: coordinates=pedal_angle_r axis=(0 0 1) LinearFunction(coefficients=1 0)
    CustomJoint ground_pelvis: socket_parent_frame_connectee_name=ground_offset
        socket_child_frame_connectee_name=../pelvis
      Coordinate pelvis_tilt: default_value=0 range=(-1.570796 1.570796) clamped=true locked=true
      Coordinate pelvis_list: default_value=0 range=(-1.570796 1.570796) clamped=true locked=true
      Coordinate pelvis_rotation: default_value=0 range=(-1.570796 1.570796) clamped=true locked=true
      Coordinate pelvis_tx: default_value=-0.1 range=(-5 5) clamped=true locked=true
      Coordinate pelvis_ty: default_value=-0.05 range=(-1 2) clamped=true locked=true
      Coordinate pelvis_tz: default_value=0 range=(-3 3) clamped=true locked=true
      PhysicalOffsetFrame ground_offset: socket_parent_connectee_name=../../ground translation=(-0.126 0.85 -0.12)
      SpatialTransform:
        TransformAxis rotation1: coordinates=pelvis_tilt axis=(0 0 1) LinearFunction(coefficients=1 0)
        TransformAxis rotation2: coordinates=pelvis_list axis=(1 0 0) LinearFunction(coefficients=1 0)
        TransformAxis rotation3: coordinates=pelvis_rotation axis=(0 1 0) LinearFunction(coefficients=1 0)
        TransformAxis translation1: coordinates=pelvis_tx axis=(1 0 0) LinearFunction(coefficients=1 0)
        TransformAxis translation2: coordinates=pelvis_ty axis=(0 1 0) LinearFunction(coefficients=1 0)
        TransformAxis translation3: coordinates=pelvis_tz axis=(0 0 1) LinearFunction(coefficients=1 0)
    CustomJoint hip_r: socket_parent_frame_connectee_name=pelvis_offset socket_child_frame_connectee_name=../femur_r
      Coordinate hip_angle_r: default_value=1.450676 range=(-2.094395 2.094395) clamped=true
      Coordinate hip_adduction_r: default_value=0.07120687 range=(-2.094395 2.094395) clamped=true
      Coordinate hip_rotation_r: default_value=-0.0662717 range=(-2.094395 2.094395) clamped=true
      PhysicalOffsetFrame pelvis_offset: socket_parent_connectee_name=../../pelvis
          translation=(-0.0739512 -0.0691397 0.0873398)
      SpatialTransform: axes_held_at_zero=(translation1 translation2 translation3)
        TransformAxis rotation1: coordinates=hip_angle_r axis=(0 0 1) LinearFunction(coefficients=1 0)
        TransformAxis rotation2: coordinates=hip_adduction_r axis=(1 0 0) LinearFunction(coefficients=1 0)
        TransformAxis rotation3: coordinates=hip_rotation_r axis=(0 1 0) LinearFunction(coefficients=1 0)
    CustomJoint knee_r: socket_parent_frame_connectee_name=../femur_r socket_child_frame_connectee_name=../tibia_r
      Coordinate knee_angle_r: default_value=-2.012746 range=(-3.14159 -0.383972) clamped=true
      Coordinate tib_tx_r: default_value=-0.002082565 range=(-5 5) clamped=false
      Coordinate tib_ty_r: default_value=-0.4945439 range=(-1 2) clamped=false
      SpatialTransform: axes_held_at_zero=(rotation2 rotation3 translation3)
        TransformAxis rotation1: coordinates=knee_angle_r axis=(0 0 1) LinearFunction(coefficients=1 0)
        TransformAxis translation1: coordinates=tib_tx_r axis=(1 0 0) LinearFunction(coefficients=1 0)
        TransformAxis translation2: coordinates=tib_ty_r axis=(0 1 0) LinearFunction(coefficients=1 0)
    CustomJoint tib_pat_r: socket_parent_frame_connectee_name=../tibia_r socket_child_frame_connectee_name=../patella_r
      Coordinate pat_angle_r: default_value=0.3080614 range=(-2.094 0.175) clamped=false
      Coordinate pat_tx_r: default_value=0.02178359 range=(-5 5) clamped=false
      Coordinate pat_ty_r: default_value=-0.02422901 range=(-5 5) clamped=false
      SpatialTransform: axes_held_at_zero=(rotation2 rotation3 translation3)
        TransformAxis rotation1: coordinates=pat_angle_r axis=(0 0 1) LinearFunction(coefficients=1 0)
        TransformAxis translation1: coordinates=pat_tx_r axis=(1 0 0) LinearFunction(coefficients=1 0)
        TransformAxis translation2: coordinates=pat_ty_r axis=(0 1 0) LinearFunction(coefficients=1 0)
    CustomJoint ankle_r: socket_parent_frame_connectee_name=tibia_r_offset socket_child_frame_connectee_name=../talus_r
      Coordinate ankle_angle_r: default_value=0.4828915 range=(-1.571 1.571) clamped=false
          is_free_to_satisfy_constraints=true
      PhysicalOffsetFrame tibia_r_offset: socket_parent_connectee_name=../../tibia_r translation=(0 -0.483203 0)
      SpatialTransform: axes_held_at_zero=(rotation2 rotation3 translation1 translation2 translation3)
        TransformAxis rotation1: coordinates=ankle_angle_r axis=(-0.105 -0.174 0.979) LinearFunction(coefficients=1 0)
    CustomJoint subtalar_r: socket_parent_frame_connectee_name=talus_r_offset
        socket_child_frame_connectee_name=../calcn_r
      Coordinate subtalar_angle_r: default_value=1.856904e-36 range=(-1.571 1.571) clamped=true locked=true
          is_free_to_satisfy_constraints=true
      PhysicalOffsetFrame talus_r_offset: socket_parent_connectee_name=../../talus_r
          translation=(-0.0620508 -0.0531864 0.0101307)
      SpatialTransform: axes_held_at_zero=(rotation2 rotation3 translation1 translation2 translation3)
        TransformAxis rotation1: coordinates=subtalar_angle_r axis=(0.787 0.605 -0.121)
            LinearFunction(coefficients=1 0)
    CustomJoint mtp_r: socket_parent_frame_connectee_name=calcn_r_offset socket_child_frame_connectee_name=../toes_r
      Coordinate mtp_angle_r: default_value=0 range=(-1.571 1.571) clamped=true locked=true
      PhysicalOffsetFrame calcn_r_offset: socket_parent_connectee_name=../../calcn_r
          translation=(0.18382 -0.00205386 0.00102692)
      SpatialTransform: axes_held_at_zero=(rotation2 rotation3 translation1 translation2 translation3)
        TransformAxis rotation1: coordinates=mtp_angle_r axis=(-0.581 0 0.814) LinearFunction(coefficients=1 0)
  ConstraintSet:
    CoordinateCouplerConstraint [values shared by the 5 below unless stated]: independent_coordinate_names=knee_angle_r
        scale_factor=1
    CoordinateCouplerConstraint knee_tx_r: dependent_coordinate_name=tib_tx_r
      coupled_coordinates_function: SimmSpline: x=(-2.0944 -1.74533 -1.39626 -1.0472 -0.698132 -0.349066 -0.174533 0.197344 0.337395 0.490178 1.52146 2.0944)
          y=(-0.0037561 0.00210107 0.00482424 0.00481249 0.00248841 -0.00117378 -0.00363871 -0.00613534 -0.00637949 -0.00654265 -0.00637949 -0.00616234)
    CoordinateCouplerConstraint knee_ty_r: dependent_coordinate_name=tib_ty_r
      coupled_coordinates_function: SimmSpline: x=(-2.0944 -1.22173 -0.523599 -0.349066 -0.174533 0.159149 2.0944)
          y=(-0.496039 -0.479137 -0.468338 -0.466695 -0.465521 -0.463953 -0.464817)
    CoordinateCouplerConstraint pat_tx_r: dependent_coordinate_name=pat_tx_r
      coupled_coordinates_function: SimmSpline: x=(-2.0944 -1.39626 -1.0472 -0.698132 -0.349066 -0.174533 0 0.00017453 0.00034907 0.0872665 2.0944)
          y=(0.0194405 0.0364088 0.042814 0.0483203 0.0527029 0.0543884 0.0557369 0.0557369 0.0557369 0.0557369 0.0557369)
    CoordinateCouplerConstraint pat_ty_r: dependent_coordinate_name=pat_ty_r
      coupled_coordinates_function: SimmSpline: x=(-2.0944 -1.5708 -1.39626 -1.0472 -0.698132 -0.349066 -0.174533 0 0.00017453 0.00034907 0.0872665 2.0944)
          y=(-0.0246096 -0.0226993 -0.0224746 -0.0229241 -0.0237107 -0.0246096 -0.0250591 -0.0255086 -0.0255086 -0.0255086 -0.0255086 -0.0255086)
    CoordinateCouplerConstraint pat_angle_r: dependent_coordinate_name=pat_angle_r
      coupled_coordinates_function: SimmSpline: x=(-2.0944 -1.99997 -1.45752 -0.526391 0.0279253 0.174533)
          y=(0.308051 0.308051 0.306305 0.270177 -0.037001 -0.279951)
    WeldConstraint PedalClip: socket_frame1_connectee_name=../pedal_r socket_frame2_connectee_name=calcn_r_offset
      PhysicalOffsetFrame calcn_r_offset: socket_parent_connectee_name=../../calcn_r translation=(0.17 -0.027 0.017)
  ForceSet:
    Thelen2003Muscle bifemlh_r: optimal_force=1 max_isometric_force=2594 optimal_fiber_length=0.1282385
        tendon_slack_length=0.383539 pennation_angle_at_optimal=0 [radians] max_contraction_velocity=10
        FmaxTendonStrain=0.033 FmaxMuscleStrain=0.6 KshapeActive=0.5 KshapePassive=4 Af=0.3 Flen=1.8
        activation_time_constant=0.01 [seconds] deactivation_time_constant=0.04 [seconds]
      PathPoint P1: socket_parent_frame_connectee_name=../../../pelvis (-0.131752 -0.107287 0.0726333)
      PathPoint P2: socket_parent_frame_connectee_name=../../../tibia_r (-0.0338242 -0.0404542 0.0330713)
      PathPoint P3: socket_parent_frame_connectee_name=../../../tibia_r (-0.0262952 -0.0632659 0.0385439)
    Thelen2003Muscle bifemsh_r: optimal_force=1 max_isometric_force=960 optimal_fiber_length=0.2008373
        tendon_slack_length=0.1033209 pennation_angle_at_optimal=0.4014257 max_contraction_velocity=10
        FmaxTendonStrain=0.033 FmaxMuscleStrain=0.6 KshapeActive=0.5 KshapePassive=4 Af=0.3 Flen=1.8
        activation_time_constant=0.01 deactivation_time_constant=0.04
      PathPoint P1: socket_parent_frame_connectee_name=../../../femur_r (0.0058689 -0.247785 0.0274665)
      PathPoint P2: socket_parent_frame_connectee_name=../../../tibia_r (-0.0338242 -0.0404542 0.0330713)
      PathPoint P3: socket_parent_frame_connectee_name=../../../tibia_r (-0.0262952 -0.0632659 0.0385439)
    Thelen2003Muscle glut_max2_r: optimal_force=1 max_isometric_force=1944 optimal_fiber_length=0.1629139
        tendon_slack_length=0.1407488 pennation_angle_at_optimal=0 max_contraction_velocity=10 FmaxTendonStrain=0.033
        FmaxMuscleStrain=0.6 KshapeActive=0.5 KshapePassive=4 Af=0.3 Flen=1.8 activation_time_constant=0.01
        deactivation_time_constant=0.04
      PathPoint P1: socket_parent_frame_connectee_name=../../../pelvis (-0.141103 0.0184094 0.058889)
      PathPoint P2: socket_parent_frame_connectee_name=../../../pelvis (-0.143928 -0.0543913 0.0956031)
      PathPoint P3: socket_parent_frame_connectee_name=../../../femur_r (-0.050003 -0.0622103 0.0343917)
      PathPoint P4: socket_parent_frame_connectee_name=../../../femur_r (-0.018311 -0.119256 0.0491814)
    Thelen2003Muscle vas_int_r: optimal_force=1 max_isometric_force=4530 optimal_fiber_length=0.1261733
        tendon_slack_length=0.136786 pennation_angle_at_optimal=0.05235988 max_contraction_velocity=10
        FmaxTendonStrain=0.033 FmaxMuscleStrain=0.6 KshapeActive=0.5 KshapePassive=4 Af=0.3 Flen=1.8
        activation_time_constant=0.01 deactivation_time_constant=0.04
      PathPoint P1: socket_parent_frame_connectee_name=../../../femur_r (0.0340396 -0.225835 0.0363872)
      PathPoint P2: socket_parent_frame_connectee_name=../../../femur_r (0.0393216 -0.244616 0.0334527)
      ConditionalPathPoint P3: socket_parent_frame_connectee_name=../../../femur_r (0.0402607 -0.473033 0.00645579)
          socket_coordinate_connectee_name=../../../knee_r/knee_angle_r range=(-2.61799 -1.42) [radians]
      MovingPathPoint P4: socket_parent_frame_connectee_name=../../../tibia_r
          socket_x_coordinate_connectee_name=../../../knee_r/knee_angle_r
          socket_y_coordinate_connectee_name=../../../knee_r/knee_angle_r
          socket_z_coordinate_connectee_name=../../../knee_r/knee_angle_r
        x_location: SimmSpline: x=(-2.0944 -1.99997 -1.5708 -1.45752 -1.39626 -1.0472 -0.698132 -0.526391 -0.349066 -0.174533 0 0.00017453 0.00034907 0.0279253 0.0872665 0.174533 2.0944)
            y=(0.00929694 0.0120089 0.022704 0.0251187 0.0263607 0.0328932 0.0392704 0.0425567 0.0463615 0.0522856 0.0623256 0.0623371 0.0623486 0.0642454 0.0688531 0.0769044 0.0729095)
        y_location: SimmSpline: x=(-2.0944 -1.99997 -1.5708 -1.45752 -1.39626 -1.0472 -0.698132 -0.526391 -0.349066 -0.174533 0 0.00017453 0.00034907 0.0279253 0.0872665 0.174533 2.0944)
            y=(0.0287664 0.0291593 0.0306917 0.0308797 0.0309195 0.0304938 0.0298616 0.0295622 0.0293503 0.0292314 0.0284217 0.0284203 0.0284189 0.0281523 0.0272157 0.0245296 -0.0770547)
        z_location: SimmSpline: x=(-2.0944 2.0944) y=(0.00202271 0.00202271)
  MarkerSet:
    Marker RASI: socket_parent_frame_connectee_name=../pelvis (0.00201364 -0.00150927 0.129764)
    Marker LASI: socket_parent_frame_connectee_name=../pelvis (0.00201364 -0.00150927 -0.129764)
    Marker RPSI: socket_parent_frame_connectee_name=../pelvis (-0.168565 0.0330764 0.0507053)
    Marker LPSI: socket_parent_frame_connectee_name=../pelvis (-0.168565 0.0330764 -0.0507053)
    Marker RTHI: socket_parent_frame_connectee_name=../femur_r (0.00109421 -0.266721 0.0939314)
    Marker RKNE: socket_parent_frame_connectee_name=../femur_r (0.00196336 -0.470462 0.0554672)
    Marker RTIB: socket_parent_frame_connectee_name=../tibia_r (-0.00512482 -0.280401 0.0550595)
    Marker RANK: socket_parent_frame_connectee_name=../tibia_r (-0.00769151 -0.465157 0.0616636)
    Marker RHEE: socket_parent_frame_connectee_name=../calcn_r (-0.0162173 0.0387516 -0.00268731)
    Marker RPED: socket_parent_frame_connectee_name=../pedal_r (0.00110124 0.00058495 0.0260081)
    Marker RTOE: socket_parent_frame_connectee_name=../calcn_r (0.186576 0.0179504 0.0014454)
